****************************************************************
*HEADING
Brain growth  2D
**
**
** Shuolun Wang, august 2019
**
**      Material parameter
**      **white matters
**      mu        = props(1)
**      lambda    = props(2)
**      Gaxn      = props(3)
**      lam0      = props(4)
**      **gray matter
**      mu_g      = props(5)
**      lambda_g  = props(6)
**      Gctx      = props(7)
**      Aconst    = props(8)
***     charlength = props(9)
**
**      State variables
**      statev(1) = growth parameter
**      statev(2) = coordx
**      statev(3) = coordy
**      statev(4) = coordz
**      statev(5) = curvature
*****************************************************************
**			input parameters
*****************************************************************
*parameter
**
***** white matter
** shear modulus(Pa)
mu = 0.1e3
**
** mechanical constant(Pa)
lam = 0.93e3
**
**
** Axon growth rate (1/hour)
Gaxn = 0.1
**
** Stretch threshold
lam0 = 1.0
**
**
**  stiffness ratio
stiffratio = 1.0
**
**** Gray matter
** shear modulus(Pa)
mu_g = stiffratio*mu
**
** mechanical constant(Pa)
lambda_g = stiffratio*lam
**
**
** rate constant for curvature
Aconst = 1.0
**
** characterstic length (m)
charlength = 1.25e-3
**
** mass scaling
mass_factor = 5.0
**
** viscous pressure coefficient
cd = 100.0
**
**cortex growth rate (1/hour)
Gctx = 1.0
**
** maximum cortex growth
Gctx_max = 3.0
**
** time for growth (h)
time = (Gctx_max - 1.0)/Gctx
**
**
**
**
**
****************************************************************
** 			MODEL DEFINITION
****************************************************************
*System
       -0.57,       -0.39,          0.,        0.43,       -0.39,          0.
*Node
      1,  0.540000021,  0.399374992
      2,  0.600000024,  0.399374992
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*imperfection
233, 0.0, -1.0e-6
*Element, type=CPE4R
  1,   1,   9, 306,   4
  2,   9,  10, 305, 306
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*Nset, nset=box-1_bottom
   7,   8, 470, 471, 472, 473
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*Elset, elset=box-1_bottom, generate
 2251,  2400,     1
*Nset, nset=box-1_top
   3,   4, 158, 159, 160, 161
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*Elset, elset=box-1_top, generate
   1,  150,    1
*Nset, nset=box-1_graybot
   5,   6, 307, 308, 309, 310
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*Elset, elset=box-1_graybot
  151,  152,  153,  154,  155,  156
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*Nset, nset=box-1_all, generate
    1,  2718,     1
*Elset, elset=box-1_all, generate
    1,  2550,     1
*Nset, nset=box-1_gray1
   1,   2,   3,   4,   9,  10
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*Elset, elset=box-1_gray1, generate
   1,  150,    1
*Nset, nset=box-1_gray2
   1,   2,   5,   6,   9,  10
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*Elset, elset=box-1_gray2, generate
 2401,  2550,     1
*Nset, nset=box-1_left
   1,   4,   6,   7, 456, 457
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*Elset, elset=box-1_left
    1,  300,  450,  600,  750,  900
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*Nset, nset=box-1_right
   2,   3,   5,   8, 619, 620
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*Elset, elset=box-1_white, generate
  151,  2400,     1
*Elset, elset=_box-1_topsurface_S3, generate
   1,  150,    1
*Surface, type=ELEMENT, name=box-1_topsurface
_box-1_topsurface_S3, S3
** ----------------------------------------------------------------
**
** PART INSTANCE: rightwall-1
**
*System
       -0.03,   -0.383125,          0.,        0.97,   -0.383125,          0.
*Node
   2719,           0.,  0.400000006,           0.
*Nset, nset=rightwall-1-RefPt_
2719,
*Surface, type=SEGMENTS, name=rightwall-1_leftrigid
START,        -0.03,     0.016875
 LINE,        -0.03, 0.00187500000000002
*Rigid Body, ref node=rightwall-1-RefPt_, analytical surface=rightwall-1_leftrigid
** ----------------------------------------------------------------
**
** PART INSTANCE: rightwall-2
**
*System
        0.03,   -0.383125,          0.,        1.03,   -0.383125,          0.
*Node
   2720,           0.,  0.400000006,           0.
*Nset, nset=rightwall-2-RefPt_
2720,
*Surface, type=SEGMENTS, name=rightwall-2_rightrigid
START,         0.03, 0.00187500000000002
 LINE,         0.03,     0.016875
*Rigid Body, ref node=rightwall-2-RefPt_, analytical surface=rightwall-2_rightrigid
*System
*Nset, nset=Set-1
2719,
*Nset, nset=Set-1
2720,
*******************************************************************
**  Specification Of Material Properties
*******************************************************************
*Section controls, hourglass=enhanced, name=sec_con
**
*Solid Section, elset=box-1_gray1, material=GRAYONE, controls=sec_con
**
**
*Material, Name=GRAYONE
***      mu        = props(1)
***      lambda    = props(2)
***      Gaxn      = props(3)
***      lam0      = props(4)
***      **gray matter
***      mu_g      = props(5)
***      lambda_g  = props(6)
***      Gctx      = props(7)
***      Aconst    = props(8)
***      charlength = props(9)
*User material,Constants=9
<mu>,<lam>,<Gaxn>,<lam0>,<mu_g>,<lambda_g>,<Gctx>,<Aconst>,
<charlength>
*Depvar
5
*Density
1.0
**
*******************************************************************
**  Specification Of Material Properties
*******************************************************************
**
*Solid Section, elset=box-1_gray2, material=GRAYTWO, controls=sec_con
**
**
*Material, Name=GRAYTWO
***      mu        = props(1)
***      lambda    = props(2)
***      Gaxn      = props(3)
***      lam0      = props(4)
***      **gray matter
***      mu_g      = props(5)
***      lambda_g  = props(6)
***      Gctx      = props(7)
***      Aconst    = props(8)
***      charlength = props(9)
*User material,Constants=9
<mu>,<lam>,<Gaxn>,<lam0>,<mu_g>,<lambda_g>,<Gctx>,<Aconst>,
<charlength>
*Depvar
5
*Density
1.0
**
*******************************************************************
**  Specification Of Material Properties
*******************************************************************
*Solid Section, elset=box-1_white, material=WHIT, controls=sec_con
**
**
*Material, Name=WHIT
***      mu        = props(1)
***      lambda    = props(2)
***      Gaxn      = props(3)
***      lam0      = props(4)
***      **gray matter
***      mu_g      = props(5)
***      lambda_g  = props(6)
***      Gctx      = props(7)
***      Aconst    = props(8)
***      charlength = props(9)
*User material,Constants=9
<mu>,<lam>,<Gaxn>,<lam0>,<mu_g>,<lambda_g>,<Gctx>,<Aconst>,
<charlength>
*Depvar
4
*Density
1.0
**
*******************************************************************
** INTERACTION PROPERTIES
*******************************************************************
**
** INTERACTION PROPERTIES
**
*Surface Interaction, name=intFric
*Friction
0.0
*Surface Behavior, pressure-overclosure=hard
**
*Surface Interaction, name=intRough
*Friction, rough
*Surface Behavior, pressure-overclosure=hard
**
*Surface Interaction, name=intNosep
*Friction
0.0
*Surface Behavior, no separation
**
*Surface Interaction, name=intSomeFric
*Friction
10.0
*Surface Behavior, pressure-overclosure=hard
**
**
**
** BOUNDARY CONDITIONS
**
** Name: botfix Type: Symmetry/Antisymmetry/Encastre
*Boundary
box-1_bottom, ENCASTRE
** Name: leftsym Type: Symmetry/Antisymmetry/Encastre
*Boundary
box-1_left, XSYMM
** Name: rightsym Type: Symmetry/Antisymmetry/Encastre
*Boundary
box-1_right, XSYMM
** Name: rigidfix Type: Symmetry/Antisymmetry/Encastre
*Boundary
Set-1, ENCASTRE
**
**
**
** ----------------------------------------------------------------
**
** STEP: grow
**
*Step, name=grow, nlgeom=YES
*dynamic, explicit
,<time>
**
*fixed mass scaling, factor=<mass_factor>
**
*Dsload
box-1_topsurface, vp, <cd>
**
***DLOAD
***box-1_all, VBF, 0.1
**
** INTERACTIONS
**
** Interaction: Int-1
*Contact Pair, interaction=intSomeFric, mechanical constraint=KINEMATIC, cpset=Int-1
box-1_topsurface, rightwall-1_leftrigid
** Interaction: Int-2
*Contact Pair, interaction=intSomeFric, mechanical constraint=KINEMATIC, cpset=Int-2
box-1_topsurface, rightwall-2_rightrigid
** Interaction: Int-3
*Contact Pair, interaction=intSomeFric, mechanical constraint=KINEMATIC, cpset=Int-3
box-1_topsurface, box-1_topsurface
**
**
** FIELD OUTPUT: F-Output-1
**
*Output, field, variable=all, NUMBER INTERVAL=500
**
** HISTORY OUTPUT: H-Output-1
**
****Output, history, TIME INTERVAL= 0.1
****NODE OUTPUT,nset=box-1_gray1
****coord
**
*Output, history,TIME INTERVAL= 0.001
*Energy output
ALLIE,ALLKE
*End Step
