****************************************************************
*HEADING
Brain growth  2D
**
**
** Shuolun Wang, august 2019
**
**      Material parameter
**      **white matters
**      mu        = props(1)
**      lambda    = props(2)
**      Gaxn      = props(3)
**      lam0      = props(4)
**      **gray matter
**      mu_g      = props(5)
**      lambda_g  = props(6)
**      Gctx      = props(7)
**      Aconst    = props(8)
***     charlength = props(9)
**
**      State variables
**      statev(1) = growth parameter
**      statev(2) = coordx
**      statev(3) = coordy
**      statev(4) = coordz
**      statev(5) = curvature
*****************************************************************
**			input parameters
*****************************************************************
*parameter
**
***** white matter
** shear modulus(Pa)
***mu = 0.1785e4
mu = 0.1e3
**
** mechanical constant(Pa)
***lam = 0.544e4
lam = 0.93e3
**
**
** Axon growth rate (1/hour)
Gaxn = 1.0
**
** Stretch threshold
lam0 = 1.0
**
**
**  stiffness ratio
stiffratio = 1.0
**
**** Gray matter
** shear modulus(Pa)
mu_g = stiffratio*mu
**
** mechanical constant(Pa)
lambda_g = stiffratio*lam
**
** rate constant for curvature
Aconst = 2.0
**
** characterstic length (m)
charlength = 1.25e-3
**
** mass scaling
mass_factor = 10
**
** viscous pressure coefficient
cd = 100.0
**
**cortex growth rate (1/hour)
Gctx = 1.0
**
** maximum cortex growth
Gctx_max = 3.0
**
** time for growth (h)
time = (Gctx_max - 1.0)/Gctx
**
**
**
****************************************************************
** 			MODEL DEFINITION
****************************************************************
*Node
      1,           0., 0.0293749999
      2,  0.035374999,           0.
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*Element, type=CPE4R
  1,   1,   8, 305,   4
  2,   8,   9, 304, 305
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*Nset, nset=quater-1_centpoint
 7,
*Nset, nset=quater-1_all, generate
    1,  2420,     1
*Elset, elset=quater-1_all, generate
    1,  2327,     1
*Nset, nset=quater-1_white
    5,    6,    7,  306,  307,  308
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*Elset, elset=quater-1_white, generate
  301,  2327,     1
*Nset, nset=quater-1_xzface
   2,   3,   6,   7, 469, 470
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*Elset, elset=quater-1_xzface
  150,  151,  303,  307,  308,  309
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*Nset, nset=quater-1_yzface
   1,   4,   5,   7, 455, 456
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*Elset, elset=quater-1_yzface
    1,  300,  307,  327,  329,  331
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*Nset, nset=quater-1_graybot
   5,   6, 306, 307, 308, 309
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*Elset, elset=quater-1_graybot
 151, 152, 153, 154, 155, 156
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*Nset, nset=quater-1_graytop
   3,   4, 157, 158, 159, 160
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*Elset, elset=quater-1_graytop, generate
   1,  150,    1
*Nset, nset=quater-1_gray2
   1,   2,   5,   6,   8,   9
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*Elset, elset=quater-1_gray2, generate
 151,  300,    1
*Nset, nset=quater-1_gray1
   1,   2,   3,   4,   8,   9
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*Elset, elset=quater-1_gray1, generate
   1,  150,    1
*Elset, elset=_quater-1_outsurface_S3, generate
   1,  150,    1
*Surface, type=ELEMENT, name=quater-1_outsurface
_quater-1_outsurface_S3, S3
** ----------------------------------------------------------------
**
** PART INSTANCE: verticalwall-1
**
*System
          0.,         0.7,          0.,          1.,         0.7,          0.
*Node
   2421,           0.,   1.29999995,           0.
*Nset, nset=verticalwall-1-RefPt_
2421,
*Surface, type=SEGMENTS, name=verticalwall-1_verticalrigid
START,           0.,           2.
 LINE,           0.,           0.
*Rigid Body, ref node=verticalwall-1-RefPt_, analytical surface=verticalwall-1_verticalrigid
** ----------------------------------------------------------------
**
** PART INSTANCE: verticalwall-2
**
*System
         0.7,          0.,          0.,         0.7,         -1.,          0.
*Node
   2422,           0.,   1.29999995,           0.
*Nset, nset=verticalwall-2-RefPt_
2422,
*Surface, type=SEGMENTS, name=verticalwall-2_horizontalrigid
START,           0.,           0.
 LINE,           2.,           0.
*Rigid Body, ref node=verticalwall-2-RefPt_, analytical surface=verticalwall-2_horizontalrigid
*System
*Nset, nset=Set-1
2421,
*Nset, nset=Set-2
2422,
*******************************************************************
**  Specification Of Material Properties
*******************************************************************
*Section controls, hourglass=enhanced, name=sec_con
*SECTION CONTROLS, NAME = Hourglass, HOURGLASS = STIFFNESS, KINEMATIC SPLIT = CENTROID
**
*Solid Section, elset=quater-1_gray1, material=GRAYONE, controls=sec_con
**
**
*Material, Name=GRAYONE
***      mu        = props(1)
***      lambda    = props(2)
***      Gaxn      = props(3)
***      lam0      = props(4)
***      **gray matter
***      mu_g      = props(5)
***      lambda_g  = props(6)
***      Gctx      = props(7)
***      Aconst    = props(8)
***      charlength = props(9)
*User material,Constants=9
<mu>,<lam>,<Gaxn>,<lam0>,<mu_g>,<lambda_g>,<Gctx>,<Aconst>,
<charlength>
*Depvar
5
*Density
1.0
**
*******************************************************************
**  Specification Of Material Properties
*******************************************************************
**
*Solid Section, elset=quater-1_gray2, material=GRAYTWO, controls=sec_con
**
**
*Material, Name=GRAYTWO
***      mu        = props(1)
***      lambda    = props(2)
***      Gaxn      = props(3)
***      lam0      = props(4)
***      **gray matter
***      mu_g      = props(5)
***      lambda_g  = props(6)
***      Gctx      = props(7)
***      Aconst    = props(8)
***      charlength = props(9)
*User material,Constants=9
<mu>,<lam>,<Gaxn>,<lam0>,<mu_g>,<lambda_g>,<Gctx>,<Aconst>,
<charlength>
*Depvar
5
*Density
1.0
**
*******************************************************************
**  Specification Of Material Properties
*******************************************************************
*Solid Section, elset=quater-1_white, material=WHIT, controls=Hourglass
**
**
*Material, Name=WHIT
***      mu        = props(1)
***      lambda    = props(2)
***      Gaxn      = props(3)
***      lam0      = props(4)
***      **gray matter
***      mu_g      = props(5)
***      lambda_g  = props(6)
***      Gctx      = props(7)
***      Aconst    = props(8)
***      charlength = props(9)
*User material,Constants=9
<mu>,<lam>,<Gaxn>,<lam0>,<mu_g>,<lambda_g>,<Gctx>,<Aconst>,
<charlength>
*Depvar
1
*Density
1.0
**
** initial condition
*INITIAL CONDITIONS,TYPE=SOLUTION,USER
**
** INTERACTION PROPERTIES
**
*Surface Interaction, name=intFric
*Friction
0.0
*Surface Behavior, pressure-overclosure=hard
**
*Surface Interaction, name=intRough
*Friction, rough
*Surface Behavior, pressure-overclosure=hard
**
*Surface Interaction, name=intNosep
*Friction
0.0
*Surface Behavior, no separation
**
*Surface Interaction, name=intSomeFric
*Friction
10.0
*Surface Behavior, pressure-overclosure=hard
**
**
**
** BOUNDARY CONDITIONS
**
** Name: centfix Type: Symmetry/Antisymmetry/Encastre
*Boundary
quater-1_centpoint, ENCASTRE
** Name: rigidfix1 Type: Symmetry/Antisymmetry/Encastre
*Boundary
Set-1, ENCASTRE
** Name: rigidfix2 Type: Symmetry/Antisymmetry/Encastre
*Boundary
Set-2, ENCASTRE
** Name: xzsym Type: Symmetry/Antisymmetry/Encastre
*Boundary
quater-1_xzface, YSYMM
** Name: yzsym Type: Symmetry/Antisymmetry/Encastre
*Boundary
quater-1_yzface, XSYMM
** ----------------------------------------------------------------
**
** STEP: grow
**
*Step, name=grow, nlgeom=YES
*dynamic, explicit
,<time>
**
*fixed mass scaling, factor=<mass_factor>
**
**
*Dsload
quater-1_outsurface, vp, <cd>
**
** INTERACTIONS
**
*Contact Pair, interaction=intSomeFric, , mechanical constraint=kinematic
quater-1_outsurface,
**
*Contact Pair, interaction=intSomeFric, , mechanical constraint=kinematic
verticalwall-1_verticalrigid , quater-1_outsurface
**
*Contact Pair, interaction=intSomeFric, , mechanical constraint=kinematic
verticalwall-2_horizontalrigid , quater-1_outsurface
**
**
**
** FIELD OUTPUT: F-Output-1
**
*Output, field, variable=all, NUMBER INTERVAL=500
**
** HISTORY OUTPUT: H-Output-1
**
*Output, history,TIME INTERVAL= 0.001
*Energy output
ALLIE,ALLKE
*End Step
