****************************************************************
*HEADING
Brain growth  3D
**
**
** Shuolun Wang, august 2019
**
**      Material parameter
**      **white matters
**      mu        = props(1)
**      lambda    = props(2)
**      Gaxn      = props(3)
**      lam0      = props(4)
**      **gray matter
**      mu_g      = props(5)
**      lambda_g  = props(6)
**      Gctx      = props(7)
**      Aconst    = props(8)
***     charlength = props(9)
**
**      State variables
**      statev(1) = growth parameter
**      statev(2) = coordx
**      statev(3) = coordy
**      statev(4) = coordz
**      statev(5) = mean curvature
**      statev(6) = SI index
*****************************************************************
**			input parameters
*****************************************************************
*parameter
**
***** white matter
** shear modulus(Pa)
***mu = 0.1785e4
mu = 0.1e3
**
** mechanical constant(Pa)
***lam = 0.544e4
lam = 0.93e3
**
**
** Axon growth rate (1/h)
**Gaxn = 0.08
Gaxn = 8.0
**
** Stretch threshold
lam0 = 1.0
**
**
**  stiffness ratio
stiffratio = 10.0
**
**** Gray matter
** shear modulus(Pa)
mu_g = stiffratio*mu
**
** mechanical constant(Pa)
lambda_g = stiffratio*lam
**
**
**
** rate constant for curvature
Aconst = 0.0
**
** characterstic length (m)
charlength = 1.0e-3
**
** mass scaling
mass_factor = 1.e2
**
** viscous pressure coefficient
cd = 100.0
**
**cortex growth rate (1/hour)
Gctx = 1.0
**
** maximum cortex growth
Gctx_max = 3.0
**
** time for growth (h)
time = (Gctx_max - 1.0)/Gctx
**
**
**
**
**
**
****************************************************************
** 			MODEL DEFINITION
****************************************************************
*System
          0.,        0.04,        0.02,          1.,        0.04,        0.02
          0.,0.0400000000000001,        1.02
*Node
      1, 0.0599999987, 0.0195000004, 0.0299999993
      2, 0.0599999987, 0.0195000004,           0.
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*Element, type=C3D8R
   1,  250,  653, 2174,  173,    1,   17,   94,    4
   2,  653,  654, 2175, 2174,   17,   18,   93,   94
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*Nset, nset=block-1_all, generate
     1,  11767,      1
*Elset, elset=block-1_all, generate
    1,  9600,     1
*Nset, nset=block-1_top
    3,    4,    6,    7,   56,   57
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*Elset, elset=block-1_top, generate
    1,  1600,     1
*Nset, nset=block-1_bot
   13,   14,   15,   16,  488,  489
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*Elset, elset=block-1_bot
 3321, 3322, 3323, 3324, 3325, 3326
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*Nset, nset=block-1_YZface
    1,    2,    3,    4,    5,    6
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*Elset, elset=block-1_YZface
    1,    2,    3,    4,    5,    6
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*Nset, nset=block-1_XYface
    1,    2,    3,    4,    5,    6
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*Elset, elset=block-1_XYface
    1,   40,   41,   80,   81,  120
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*Nset, nset=block-1_white
     9,    10,    11,    12,    13,    14
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*Elset, elset=block-1_white, generate
 3201,  9600,     1
*Nset, nset=block-1_gray1
    1,    2,    3,    4,    5,    6
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*Elset, elset=block-1_gray1, generate
    1,  1600,     1
*Nset, nset=block-1_gray2
    1,    2,    5,    8,    9,   10
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*Elset, elset=block-1_gray2, generate
 1601,  3200,     1
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*Elset, elset=_block-1_topsurf_S5, generate
    1,  1600,     1
*Surface, type=ELEMENT, name=block-1_topsurf
_block-1_topsurf_S5, S5
** ----------------------------------------------------------------
**
** PART INSTANCE: RigigWall-1
**
*System
        0.03,       0.025,        0.04,        1.03,       0.025,        0.04
        0.03,0.0250000000000001,        1.04
*Node
  11768,           0., 0.0199999996,           0.
*Nset, nset=RigigWall-1-RefPt_
11768,
*Surface, type=CYLINDER, name=RigigWall-1_rigidsurf4
0.03, 0.025, 0.04, 100.03, 0.025, 0.04
0.03, 100.025, 0.04
START,           0.,         0.02
 LINE,           0.,        -0.01
*Rigid Body, ref node=RigigWall-1-RefPt_, analytical surface=RigigWall-1_rigidsurf4
** ----------------------------------------------------------------
**
** PART INSTANCE: RigigWall-2
**
*System
       0.045,        0.01,        0.04,0.0450000000000001,       -0.99,        0.04
0.0450000000000001,        0.01,        1.04
*Node
  11769,           0., 0.0199999996,           0.
*Nset, nset=RigigWall-2-RefPt_
11769,
*Surface, type=CYLINDER, name=RigigWall-2_rigidsurf3
0.045, 0.01, 0.04, 0.045, -99.99, 0.04
100.045, 0.01, 0.04
START,           0.,        -0.01
 LINE,           0.,         0.02
*Rigid Body, ref node=RigigWall-2-RefPt_, analytical surface=RigigWall-2_rigidsurf3
** ----------------------------------------------------------------
**
** PART INSTANCE: RigigWall-3
**
*System
       0.045,        0.04,        0.04,0.0450000000000001,       -0.96,        0.04
0.0449999999999998,        0.04,        1.04
*Node
  11770,           0., 0.0199999996,           0.
*Nset, nset=RigigWall-3-RefPt_
11770,
*Surface, type=CYLINDER, name=RigigWall-3_rigidsurf1
0.045, 0.04, 0.04, 0.045, -99.96, 0.04
100.045, 0.04, 0.04
START,           0.,         0.02
 LINE,           0.,        -0.01
*Rigid Body, ref node=RigigWall-3-RefPt_, analytical surface=RigigWall-3_rigidsurf1
** ----------------------------------------------------------------
**
** PART INSTANCE: RigigWall-4
**
*System
        0.06,       0.025,        0.04,       -0.94,0.0249999999999999,        0.04
        0.06,0.0249999999999999,        1.04
*Node
  11771,           0., 0.0199999996,           0.
*Nset, nset=RigigWall-4-RefPt_
11771,
*Surface, type=CYLINDER, name=RigigWall-4_rigidsurf2
0.06, 0.025, 0.04, -99.94, 0.025, 0.04
0.06, -99.975, 0.04
START,           0.,         0.02
 LINE,           0.,        -0.01
*Rigid Body, ref node=RigigWall-4-RefPt_, analytical surface=RigigWall-4_rigidsurf2
*System
*Nset, nset=Set-1
11768,
*Nset, nset=Set-1
11769,
*Nset, nset=Set-1
11770,
*Nset, nset=Set-1
11771,
*******************************************************************
**  Specification Of Material Properties
*******************************************************************
*Section controls, hourglass=enhanced, name=sec_con
*Solid Section, elset=block-1_gray1, material=GRAY,controls=sec_con
**
**
*Material, Name=GRAY
***      mu        = props(1)
***      lambda    = props(2)
***      Gaxn      = props(3)
***      lam0      = props(4)
***      **gray matter
***      mu_g      = props(5)
***      lambda_g  = props(6)
***      Gctx      = props(7)
***      Aconst    = props(8)
***      charlength = props(9)
*User material,Constants=9
<mu>,<lam>,<Gaxn>,<lam0>,<mu_g>,<lambda_g>,<Gctx>,<Aconst>,
<charlength>
*Depvar
6
*Density
1.0
**
*******************************************************************
**  Specification Of Material Properties
*******************************************************************
*Solid Section, elset=block-1_gray2, material=GRAZ,controls=sec_con
**
**
*Material, Name=GRAZ
***      mu        = props(1)
***      lambda    = props(2)
***      Gaxn      = props(3)
***      lam0      = props(4)
***      **gray matter
***      mu_g      = props(5)
***      lambda_g  = props(6)
***      Gctx      = props(7)
***      Aconst    = props(8)
***      charlength = props(9)
*User material,Constants=9
<mu>,<lam>,<Gaxn>,<lam0>,<mu_g>,<lambda_g>,<Gctx>,<Aconst>,
<charlength>
*Depvar
6
*Density
1.0
**
*******************************************************************
**  Specification Of Material Properties
*******************************************************************
*Solid Section, elset=block-1_white, material=WHIT, controls=sec_con
**
**
*Material, Name=WHIT
***      mu        = props(1)
***      lambda    = props(2)
***      Gaxn      = props(3)
***      lam0      = props(4)
***      **gray matter
***      mu_g      = props(5)
***      lambda_g  = props(6)
***      Gctx      = props(7)
***      Aconst    = props(8)
***      charlength = props(9)
*User material,Constants=9
<mu>,<lam>,<Gaxn>,<lam0>,<mu_g>,<lambda_g>,<Gctx>,<Aconst>,
<charlength>
*Depvar
1
*Density
1.0
**
**
*********************************************************************
**                 INITIAL CONDITIONS, MODEL DATA
*********************************************************************
*INITIAL CONDITIONS,TYPE=SOLUTION,USER
**
**
** INTERACTION PROPERTIES
**
*Surface Interaction, name=intFric
*Friction
0.0
*Surface Behavior, pressure-overclosure=hard
**
*Surface Interaction, name=intRough
*Friction, rough
*Surface Behavior, pressure-overclosure=hard
**
*Surface Interaction, name=intNosep
*Friction
0.0
*Surface Behavior, no separation
**
*Surface Interaction, name=intSomeFric
*Friction
10.0
*Surface Behavior, pressure-overclosure=hard
**
** BOUNDARY CONDITIONS
**
** Name: XYsym Type: Symmetry/Antisymmetry/Encastre
*Boundary
block-1_XYface, YSYMM
** Name: YZsym Type: Symmetry/Antisymmetry/Encastre
*Boundary
block-1_YZface, XSYMM
** Name: botfix Type: Symmetry/Antisymmetry/Encastre
*Boundary
block-1_bot, ENCASTRE
** Name: wallfix Type: Symmetry/Antisymmetry/Encastre
*Boundary
Set-1, ENCASTRE
** ----------------------------------------------------------------
**
** STEP: grow
**
*Step, name=grow, nlgeom=YES
*dynamic, explicit
,<time>
**
*fixed mass scaling, factor=<mass_factor>
**
**
**
*Dsload
block-1_topsurf, vp, <cd>
**
**
** INTERACTIONS
**
*Contact Pair, interaction=intSomeFric, , mechanical constraint=kinematic
block-1_topsurf,
**
*Contact Pair, interaction=intSomeFric, , mechanical constraint=kinematic
RigigWall-1_rigidsurf4 , block-1_topsurf
**
*Contact Pair, interaction=intSomeFric, , mechanical constraint=kinematic
RigigWall-2_rigidsurf3 , block-1_topsurf
**
*Contact Pair, interaction=intSomeFric, , mechanical constraint=kinematic
RigigWall-3_rigidsurf1 , block-1_topsurf
**
*Contact Pair, interaction=intSomeFric, , mechanical constraint=kinematic
RigigWall-4_rigidsurf2 , block-1_topsurf
**
** OUTPUT REQUESTS
**
**
** FIELD OUTPUT: F-Output-1
**
*Output, field, variable=all, NUMBER INTERVAL=500
**
** HISTORY OUTPUT: H-Output-1
**
*Output, history, variable=PRESELECT
*End Step
